# OpenSim document version 40000
ForwardTool Jumper:
  replace_force_set: false
  results_directory: ForwardResults
  output_precision: 20
  initial_time: 0
  final_time: 1
  solve_for_equilibrium_for_auxiliary_states: true
  maximum_number_of_integrator_steps: 20000
  maximum_integrator_step_size: 1
  minimum_integrator_step_size: 1e-8
  integrator_error_tolerance: 0.001
  states_file: Simulation_Lab1_initial_states.sto
  use_specified_dt: false
  AnalysisSet Analyses:
    JointReaction: start_time=0 end_time=1 step_interval=1 in_degrees=true joint_names=ALL apply_on_bodies=child
        express_in_frame=ground
    ForceReporter: start_time=0 end_time=1 step_interval=1 in_degrees=true include_constraint_forces=false
    BodyKinematics: start_time=0 end_time=1 step_interval=1 in_degrees=true bodies=all
        express_results_in_body_local_frame=false
  ControllerSet Controllers:
    ControlSetController: controls_file=Simulation_Lab1_controls.xml
