# OpenSim document version 40000
Model YourNameLowerExtremityModel:
  gravity: 0 -9.80665 0
  credits: Model authors names..
  publications: List of publications related to model...
  length_units: meters
  force_units: N
  Ground
  BodySet:
    Body pelvis: mass=0 [kg] mass_center=(0 0 0) inertia=(0 0 0 0 0 0)
        meshes=(s1_pelvis.vtp s1_pelvis_flip.vtp s1_sacrum_flip.vtp s1_sacrum.vtp)
    Body femur: mass=0 mass_center=(0 0 0) inertia=(0 0 0 0 0 0) meshes=s1_femur.vtp
    Body tibia: mass=0 mass_center=(0 0 0) inertia=(0 0 0 0 0 0) meshes=(s1_tibia.vtp s1_fibula.vtp)
    Body semimem: mass=0 mass_center=(0 0 0) inertia=(0 0 0 0 0 0) meshes=s1p_semimem.vtp
    Body semiten: mass=0 mass_center=(0 0 0) inertia=(0 0 0 0 0 0) meshes=s1p_semiten.vtp
  JointSet:
    WeldJoint grnd_pelvis: socket_parent_frame=ground_offset socket_child_frame=pelvis_offset
      PhysicalOffsetFrame ground_offset: socket_parent=/ground translation=(0 0 0) [meters]
      PhysicalOffsetFrame pelvis_offset: socket_parent=/bodyset/pelvis translation=(0 0 0)
    WeldJoint pelvis_femur: socket_parent_frame=pelvis_offset socket_child_frame=femur_offset
      PhysicalOffsetFrame pelvis_offset: socket_parent=/bodyset/pelvis translation=(0 0 0)
      PhysicalOffsetFrame femur_offset: socket_parent=/bodyset/femur translation=(0 0 0)
    WeldJoint pelvis_tibia: socket_parent_frame=pelvis_offset socket_child_frame=tibia_offset
      PhysicalOffsetFrame pelvis_offset: socket_parent=/bodyset/pelvis translation=(0 0 0)
      PhysicalOffsetFrame tibia_offset: socket_parent=/bodyset/tibia translation=(0 0 0)
    WeldJoint pelvis_semimem: socket_parent_frame=pelvis_offset socket_child_frame=semimem_offset
      PhysicalOffsetFrame pelvis_offset: socket_parent=/bodyset/pelvis translation=(0 0 0)
      PhysicalOffsetFrame semimem_offset: socket_parent=/bodyset/semimem translation=(0 0 0)
    WeldJoint pelvis_semiten: socket_parent_frame=pelvis_offset socket_child_frame=semiten_offset
      PhysicalOffsetFrame pelvis_offset: socket_parent=/bodyset/pelvis translation=(0 0 0)
      PhysicalOffsetFrame semiten_offset: socket_parent=/bodyset/semiten translation=(0 0 0)
  ForceSet:
    Schutte1993Muscle_Deprecated landmark1: optimal_force=1 max_isometric_force=100 optimal_fiber_length=0.05
        tendon_slack_length=0.05 pennation_angle_at_optimal=0 [radians] max_contraction_velocity=10 time_scale=0.1
        activation1=7.667 activation2=1.459854 damping=0.05
      PathPoint P1: pelvis (0 0 0)
      PathPoint P2: pelvis (-0.052233 -0.074438 -0.093444)
      tendon_force_length_curve: SimmSpline: x=(-10 -0.002 -0.001 0 0.00131 0.00281 0.00431 0.00581 0.00731 0.00881 0.0103 0.0118 0.0123 9.2 9.201 9.202 20)
          y=(0 0 0 0 0.0108 0.0257 0.0435 0.0652 0.0915 0.123 0.161 0.208 0.227 345 345 345 345)
      active_force_length_curve: SimmSpline: x=(-5 0 0.401 0.402 0.4035 0.52725 0.62875 0.71875 0.86125 1.045 1.2175 1.43875 1.61875 1.62 1.621 2.2 5)
          y=(0 0 0 0 0 0.226667 0.636667 0.856667 0.95 0.993333 0.77 0.246667 0 0 0 0 0)
      passive_force_length_curve: SimmSpline: x=(-5 0.998 0.999 1 1.1 1.2 1.3 1.4 1.5 1.6 1.601 1.602 5)
          y=(0 0 0 0 0.035 0.12 0.26 0.55 1.17 2 2 2 2)
    ObjectGroup
  MarkerSet:
    Marker hip_center: ground (-0.052233 -0.07444 -0.093444)
    Marker MEDEP: ground (0.0974 -0.42634 -0.09336)
    Marker LATEP: ground (0.1111 -0.40612 -0.16526)
    Marker semiten_origin: ground (-0.098599 -0.119465 -0.082462)
    Marker semiten_insertion: ground (0.102716 -0.492008 -0.115147)
