# OpenSim document version 40000
Model RightArm:
  gravity: 0 -9.80665 0
  credits: Model authors names..
  publications: List of publications related to model...
  length_units: meters
  force_units: N
  Ground: meshes=newribs2.vtp
  BodySet:
    Body spine: mass=0 [kg] mass_center=(0 0 0) inertia=(0 0 0 0 0 0)
    Body humerus: mass=0 mass_center=(0 0 0) inertia=(0 0 0 0 0 0) meshes=humerus.vtp
    Body scapula: mass=0 mass_center=(0 0 0) inertia=(0 0 0 0 0 0) meshes=newscap2.vtp
    Body clavicle: mass=0 mass_center=(0 0 0) inertia=(0 0 0 0 0 0) meshes=clav.vtp
    Body ulna: mass=0 mass_center=(0 0 0) inertia=(0 0 0 0 0 0) meshes=ulna.vtp
    Body radius: mass=0 mass_center=(0 0 0) inertia=(0 0 0 0 0 0) meshes=radius.vtp
  JointSet:
    WeldJoint spinejnt: socket_parent_frame=ground_offset socket_child_frame=spine_offset
      PhysicalOffsetFrame ground_offset: socket_parent=/ground translation=(0 -0.3 0) [meters]
      PhysicalOffsetFrame spine_offset: socket_parent=/bodyset/spine translation=(0 0 0)
    CustomJoint shoulder: socket_parent_frame=ground_offset socket_child_frame=humerus_offset
      Coordinate shoulder_flex: default_value=0 range=(-0.5235988 3.141593) clamped=true
      Coordinate shoulder_rot: default_value=0 range=(-0.3490659 0.3490659) clamped=true
      Coordinate shoulder_add: default_value=0 range=(-0.1745329 3.141593) clamped=true
      PhysicalOffsetFrame ground_offset: socket_parent=/ground translation=(-0.017545 -0.007 0.17)
      PhysicalOffsetFrame humerus_offset: socket_parent=/bodyset/humerus translation=(0 0 0)
      SpatialTransform: axes_held_at_zero=(translation1 translation2 translation3)
        TransformAxis rotation1: coordinates=shoulder_flex axis=(0 0 1) LinearFunction(coefficients=1 0)
        TransformAxis rotation2: coordinates=shoulder_rot axis=(0 1 0) LinearFunction(coefficients=1 0)
        TransformAxis rotation3: coordinates=shoulder_add axis=(1 0 0) LinearFunction(coefficients=1 0)
    WeldJoint scapulothoracic: socket_parent_frame=ground_offset socket_child_frame=scapula_offset
      PhysicalOffsetFrame ground_offset: socket_parent=/ground translation=(-0.008 0.027 0.161)
          orientation=(0 -0.261799 -0.174533) [radians]
      PhysicalOffsetFrame scapula_offset: socket_parent=/bodyset/scapula translation=(0 0 0)
    WeldJoint sternoclavicular: socket_parent_frame=ground_offset socket_child_frame=clavicle_offset
      PhysicalOffsetFrame ground_offset: socket_parent=/ground translation=(0.006325 0.00693 0.025465)
          orientation=(-0.0349066 -0.0436332 0)
      PhysicalOffsetFrame clavicle_offset: socket_parent=/bodyset/clavicle translation=(0 0 0)
    CustomJoint elbow: socket_parent_frame=humerus_offset socket_child_frame=ulna_offset
      Coordinate elbow_flexion: default_value=0 range=(0 2.268928) clamped=true
      PhysicalOffsetFrame humerus_offset: socket_parent=/bodyset/humerus translation=(0.0127 -0.274 0.0389)
      PhysicalOffsetFrame ulna_offset: socket_parent=/bodyset/ulna translation=(0 0 0)
      SpatialTransform: axes_held_at_zero=(rotation2 rotation3 translation1 translation2 translation3)
        TransformAxis rotation1: coordinates=elbow_flexion axis=(0.2260469 0.1910399 0.9551997)
            LinearFunction(coefficients=1 0)
    CustomJoint radioulnar: socket_parent_frame=ulna_offset socket_child_frame=radius_offset
      Coordinate pro_sup: default_value=0 range=(-1.570796 1.22173) clamped=true
      PhysicalOffsetFrame ulna_offset: socket_parent=/bodyset/ulna translation=(-0.0065 -0.008 0.027)
      PhysicalOffsetFrame radius_offset: socket_parent=/bodyset/radius translation=(0 0 0)
      SpatialTransform: axes_held_at_zero=(rotation1 rotation3 translation1 translation2 translation3)
        TransformAxis rotation2: coordinates=pro_sup axis=(0.05639802 0.9835774 -0.1714491)
            LinearFunction(coefficients=1 0)
  ForceSet:
    Schutte1993Muscle_Deprecated [values shared by the 8 below unless stated]: optimal_force=1
        pennation_angle_at_optimal=0 [radians] max_contraction_velocity=10 time_scale=0.1 activation1=7.667
        activation2=1.459854 damping=0.05
      tendon_force_length_curve: SimmSpline: x=(-10 -0.002 -0.001 0 0.00131 0.00281 0.00431 0.00581 0.00731 0.00881 0.0103 0.0118 0.0123 9.2 9.201 9.202 20)
          y=(0 0 0 0 0.0108 0.0257 0.0435 0.0652 0.0915 0.123 0.161 0.208 0.227 345 345 345 345)
      active_force_length_curve: SimmSpline: x=(-5 0 0.401 0.402 0.4035 0.52725 0.62875 0.71875 0.86125 1.045 1.2175 1.43875 1.61875 1.62 1.621 2.2 5)
          y=(0 0 0 0 0 0.226667 0.636667 0.856667 0.95 0.993333 0.77 0.246667 0 0 0 0 0)
      passive_force_length_curve: SimmSpline: x=(-5 0.998 0.999 1 1.1 1.2 1.3 1.4 1.5 1.6 1.601 1.602 5)
          y=(0 0 0 0 0.035 0.12 0.26 0.55 1.17 2 2 2 2)
    Schutte1993Muscle_Deprecated bra: max_isometric_force=246.96 optimal_fiber_length=0.09 tendon_slack_length=0.05
      PathPoint P1: humerus (0.01175 -0.16622 0.02744)
      PathPoint P2: humerus (0.03496 -0.25428 0.03254)
      PathPoint P3: ulna (-0.00726 -0.03064 0.00779)
    Schutte1993Muscle_Deprecated bicsh: max_isometric_force=74.09 optimal_fiber_length=0.15 tendon_slack_length=0.15
      PathPoint P1: scapula (0.0129 -0.03832 -0.02946)
      PathPoint P2: humerus (0.04618 -0.24951 0.04002)
      ConditionalPathPoint P3: radius (0.00833 -0.02074 -0.00583) socket_coordinate=/jointset/radioulnar/pro_sup
          range=(0.523599 1.22173) [radians]
      ConditionalPathPoint P4: radius (0.00184 -0.02394 -0.00779) socket_coordinate=/jointset/radioulnar/pro_sup
          range=(0 1.22173)
      ConditionalPathPoint P5: radius (-0.00519 -0.0266 -0.00609) socket_coordinate=/jointset/radioulnar/pro_sup
          range=(-1.0472 1.22173)
      PathPoint P6: radius (-0.00754 -0.02925 0.00408)
    Schutte1993Muscle_Deprecated biclh: max_isometric_force=88.2 optimal_fiber_length=0.136 tendon_slack_length=0.212
      PathPoint P1: scapula (-0.01691 -0.02662 -0.01629)
      PathPoint P2: humerus (0.01098 0.01702 -0.00685)
      PathPoint P3: humerus (0.0178 0.01096 0.00283)
      PathPoint P4: humerus (0.022 -0.00049 0.00567)
      PathPoint P5: humerus (0.04618 -0.24951 0.04002)
      ConditionalPathPoint P6: radius (0.00833 -0.02074 -0.00583) socket_coordinate=/jointset/radioulnar/pro_sup
          range=(0.523599 1.22173)
      ConditionalPathPoint P7: radius (0.00184 -0.02394 -0.00779) socket_coordinate=/jointset/radioulnar/pro_sup
          range=(0 1.22173)
      ConditionalPathPoint P8: radius (-0.00519 -0.0266 -0.00609) socket_coordinate=/jointset/radioulnar/pro_sup
          range=(-1.0472 1.22173)
      PathPoint P9: radius (-0.00754 -0.02925 0.00408)
    Schutte1993Muscle_Deprecated brd: max_isometric_force=52.92 optimal_fiber_length=0.164 tendon_slack_length=0.125
      PathPoint P1: humerus (0.00118 -0.21492 0.04467)
      ConditionalPathPoint P2: humerus (0.03039 -0.23604 0.0456) socket_coordinate=/jointset/elbow/elbow_flexion
          range=(0 1.06465)
      PathPoint P3: radius (0.02499 -0.16223 0.01347)
      PathPoint P4: radius (0.02442 -0.21108 0.02058)
    Schutte1993Muscle_Deprecated pt: max_isometric_force=119.95 optimal_fiber_length=0.056 tendon_slack_length=0.095
      PathPoint P1: humerus (0.0082 -0.27007 0.01213)
      ConditionalPathPoint P2: radius (0.01852 -0.10147 0.00675) socket_coordinate=/jointset/radioulnar/pro_sup
          range=(-1.5708 -0.767945)
      PathPoint P3: radius (0.0256 -0.11153 0.015)
    Schutte1993Muscle_Deprecated trilong: max_isometric_force=236.38 optimal_fiber_length=0.102
        tendon_slack_length=0.165
      PathPoint P1: scapula (-0.03517 -0.06028 -0.0047)
      ConditionalPathPoint P2: humerus (-0.0185 -0.27592 0.03613) socket_coordinate=/jointset/elbow/elbow_flexion
          range=(0.663225 2.26893)
      ConditionalPathPoint P3: humerus (-0.00305 -0.29341 0.03613) socket_coordinate=/jointset/elbow/elbow_flexion
          range=(1.72788 2.26893)
      PathPoint P4: ulna (-0.03213 0.00647 -0.00264)
    Schutte1993Muscle_Deprecated trimed: max_isometric_force=215.21 optimal_fiber_length=0.063
        tendon_slack_length=0.065
      PathPoint P1: humerus (-0.0089 -0.16356 0.02011)
      PathPoint P2: humerus (-0.01119 -0.18501 0.02348)
      ConditionalPathPoint P3: humerus (-0.0185 -0.27592 0.03613) socket_coordinate=/jointset/elbow/elbow_flexion
          range=(0.558505 2.26893)
      ConditionalPathPoint P4: humerus (-0.00305 -0.29341 0.03613) socket_coordinate=/jointset/elbow/elbow_flexion
          range=(1.72788 2.26893)
      PathPoint P5: ulna (-0.03213 0.00647 -0.00264)
    Schutte1993Muscle_Deprecated trilat: max_isometric_force=211.68 optimal_fiber_length=0.084 tendon_slack_length=0.11
      PathPoint P1: humerus (-0.01079 -0.09461 0.01626)
      PathPoint P2: humerus (-0.0133 -0.16404 0.02569)
      ConditionalPathPoint P3: humerus (-0.0185 -0.27592 0.03613) socket_coordinate=/jointset/elbow/elbow_flexion
          range=(0.593412 2.26893)
      ConditionalPathPoint P4: humerus (-0.00305 -0.29341 0.03613) socket_coordinate=/jointset/elbow/elbow_flexion
          range=(1.72788 2.26893)
      PathPoint P5: ulna (-0.03213 0.00647 -0.00264)
    ObjectGroup elb_flex: members=(biclh bicsh bra brd pt trilat trilong trimed)
    ObjectGroup supinator: members=(biclh bicsh brd pt trilat trilong trimed)
    ObjectGroup should_flex: members=(biclh bicsh brd pt trilat trilong trimed)
