# OpenSim document version 40000
Model Visualize3DAnatomy:
  gravity: 0 -9.80665 0
  credits: Model authors names..
  publications: List of publications related to model...
  length_units: meters
  force_units: N
  Ground
  BodySet:
    Body pelvis: mass=0 [kg] mass_center=(0 0 0) inertia=(0 0 0 0 0 0)
        meshes=(s1_pelvis.vtp s1_pelvis_flip.vtp s1_sacrum_flip.vtp s1_sacrum.vtp)
    Body femur: mass=0 mass_center=(0 0 0) inertia=(0 0 0 0 0 0) meshes=s1_femur.vtp
    Body tibia: mass=0 mass_center=(0 0 0) inertia=(0 0 0 0 0 0) meshes=(s1_tibia.vtp s1_fibula.vtp)
    Body patella: mass=0 mass_center=(0 0 0) inertia=(0 0 0 0 0 0) meshes=s1_patella.vtp
    Body addlongus: mass=0 mass_center=(0 0 0) inertia=(0 0 0 0 0 0) meshes=s1p_addlongus.vtp
    Body addmagnus: mass=0 mass_center=(0 0 0) inertia=(0 0 0 0 0 0) meshes=s1p_addmagnus.vtp
    Body bflh: mass=0 mass_center=(0 0 0) inertia=(0 0 0 0 0 0) meshes=s1p_bflh.vtp
    Body bfsh: mass=0 mass_center=(0 0 0) inertia=(0 0 0 0 0 0) meshes=s1p_bfsh.vtp
    Body gmax: mass=0 mass_center=(0 0 0) inertia=(0 0 0 0 0 0) meshes=s1p_gmax.vtp
    Body gmed: mass=0 mass_center=(0 0 0) inertia=(0 0 0 0 0 0) meshes=s1p_gmed.vtp
    Body gmin: mass=0 mass_center=(0 0 0) inertia=(0 0 0 0 0 0) meshes=s1p_gmin.vtp
    Body gracilis: mass=0 mass_center=(0 0 0) inertia=(0 0 0 0 0 0) meshes=s1p_gra.vtp
    Body iliacus: mass=0 mass_center=(0 0 0) inertia=(0 0 0 0 0 0) meshes=s1p_iliacus.vtp
    Body obturint: mass=0 mass_center=(0 0 0) inertia=(0 0 0 0 0 0) meshes=s1p_obturint.vtp
    Body obturext: mass=0 mass_center=(0 0 0) inertia=(0 0 0 0 0 0) meshes=s1p_obturext.vtp
    Body pectineus: mass=0 mass_center=(0 0 0) inertia=(0 0 0 0 0 0) meshes=s1p_pectineus.vtp
    Body psoas: mass=0 mass_center=(0 0 0) inertia=(0 0 0 0 0 0) meshes=s1p_psoas.vtp
    Body quadfem: mass=0 mass_center=(0 0 0) inertia=(0 0 0 0 0 0) meshes=s1p_quadfem.vtp
    Body rf: mass=0 mass_center=(0 0 0) inertia=(0 0 0 0 0 0) meshes=s1p_rf.vtp
    Body sartorius: mass=0 mass_center=(0 0 0) inertia=(0 0 0 0 0 0) meshes=s1p_sart.vtp
    Body semimem: mass=0 mass_center=(0 0 0) inertia=(0 0 0 0 0 0) meshes=s1p_semimem.vtp
    Body semiten: mass=0 mass_center=(0 0 0) inertia=(0 0 0 0 0 0) meshes=s1p_semiten.vtp
    Body tfl: mass=0 mass_center=(0 0 0) inertia=(0 0 0 0 0 0) meshes=s1p_tfl.vtp
  JointSet:
    CustomJoint grnd_pelvis: socket_parent_frame=ground_offset socket_child_frame=pelvis_offset
      Coordinate rx: default_value=0 range=(-1.570796 1.570796) clamped=true
      Coordinate ry: default_value=0 range=(-1.570796 1.570796) clamped=true
      Coordinate rz: default_value=0 range=(-1.570796 1.570796) clamped=true
      PhysicalOffsetFrame ground_offset: socket_parent=/ground translation=(0 0 0) [meters]
      PhysicalOffsetFrame pelvis_offset: socket_parent=/bodyset/pelvis translation=(0 0 0)
      SpatialTransform: axes_held_at_zero=(translation1 translation2 translation3)
        TransformAxis rotation1: coordinates=rx axis=(1 0 0) LinearFunction(coefficients=1 0)
        TransformAxis rotation2: coordinates=ry axis=(0 1 0) LinearFunction(coefficients=1 0)
        TransformAxis rotation3: coordinates=rz axis=(0 0 1) LinearFunction(coefficients=1 0)
    WeldJoint pelvis_femur: socket_parent_frame=pelvis_offset socket_child_frame=femur_offset
      PhysicalOffsetFrame pelvis_offset: socket_parent=/bodyset/pelvis translation=(0 0 0)
      PhysicalOffsetFrame femur_offset: socket_parent=/bodyset/femur translation=(0 0 0)
    WeldJoint pelvis_tibia: socket_parent_frame=pelvis_offset socket_child_frame=tibia_offset
      PhysicalOffsetFrame pelvis_offset: socket_parent=/bodyset/pelvis translation=(0 0 0)
      PhysicalOffsetFrame tibia_offset: socket_parent=/bodyset/tibia translation=(0 0 0)
    WeldJoint pelvis_patella: socket_parent_frame=pelvis_offset socket_child_frame=patella_offset
      PhysicalOffsetFrame pelvis_offset: socket_parent=/bodyset/pelvis translation=(0 0 0)
      PhysicalOffsetFrame patella_offset: socket_parent=/bodyset/patella translation=(0 0 0)
    WeldJoint pelvis_addlongus: socket_parent_frame=pelvis_offset socket_child_frame=addlongus_offset
      PhysicalOffsetFrame pelvis_offset: socket_parent=/bodyset/pelvis translation=(0 0 0)
      PhysicalOffsetFrame addlongus_offset: socket_parent=/bodyset/addlongus translation=(0 0 0)
    WeldJoint pelvis_addmagnus: socket_parent_frame=pelvis_offset socket_child_frame=addmagnus_offset
      PhysicalOffsetFrame pelvis_offset: socket_parent=/bodyset/pelvis translation=(0 0 0)
      PhysicalOffsetFrame addmagnus_offset: socket_parent=/bodyset/addmagnus translation=(0 0 0)
    WeldJoint pelvis_bflh: socket_parent_frame=pelvis_offset socket_child_frame=bflh_offset
      PhysicalOffsetFrame pelvis_offset: socket_parent=/bodyset/pelvis translation=(0 0 0)
      PhysicalOffsetFrame bflh_offset: socket_parent=/bodyset/bflh translation=(0 0 0)
    WeldJoint pelvis_bfsh: socket_parent_frame=pelvis_offset socket_child_frame=bfsh_offset
      PhysicalOffsetFrame pelvis_offset: socket_parent=/bodyset/pelvis translation=(0 0 0)
      PhysicalOffsetFrame bfsh_offset: socket_parent=/bodyset/bfsh translation=(0 0 0)
    WeldJoint pelvis_gmax: socket_parent_frame=pelvis_offset socket_child_frame=gmax_offset
      PhysicalOffsetFrame pelvis_offset: socket_parent=/bodyset/pelvis translation=(0 0 0)
      PhysicalOffsetFrame gmax_offset: socket_parent=/bodyset/gmax translation=(0 0 0)
    WeldJoint pelvis_gmed: socket_parent_frame=pelvis_offset socket_child_frame=gmed_offset
      PhysicalOffsetFrame pelvis_offset: socket_parent=/bodyset/pelvis translation=(0 0 0)
      PhysicalOffsetFrame gmed_offset: socket_parent=/bodyset/gmed translation=(0 0 0)
    WeldJoint pelvis_gmin: socket_parent_frame=pelvis_offset socket_child_frame=gmin_offset
      PhysicalOffsetFrame pelvis_offset: socket_parent=/bodyset/pelvis translation=(0 0 0)
      PhysicalOffsetFrame gmin_offset: socket_parent=/bodyset/gmin translation=(0 0 0)
    WeldJoint pelvis_gracilis: socket_parent_frame=pelvis_offset socket_child_frame=gracilis_offset
      PhysicalOffsetFrame pelvis_offset: socket_parent=/bodyset/pelvis translation=(0 0 0)
      PhysicalOffsetFrame gracilis_offset: socket_parent=/bodyset/gracilis translation=(0 0 0)
    WeldJoint pelvis_iliacus: socket_parent_frame=pelvis_offset socket_child_frame=iliacus_offset
      PhysicalOffsetFrame pelvis_offset: socket_parent=/bodyset/pelvis translation=(0 0 0)
      PhysicalOffsetFrame iliacus_offset: socket_parent=/bodyset/iliacus translation=(0 0 0)
    WeldJoint pelvis_obturint: socket_parent_frame=pelvis_offset socket_child_frame=obturint_offset
      PhysicalOffsetFrame pelvis_offset: socket_parent=/bodyset/pelvis translation=(0 0 0)
      PhysicalOffsetFrame obturint_offset: socket_parent=/bodyset/obturint translation=(0 0 0)
    WeldJoint pelvis_obturext: socket_parent_frame=pelvis_offset socket_child_frame=obturext_offset
      PhysicalOffsetFrame pelvis_offset: socket_parent=/bodyset/pelvis translation=(0 0 0)
      PhysicalOffsetFrame obturext_offset: socket_parent=/bodyset/obturext translation=(0 0 0)
    WeldJoint pelvis_pectineus: socket_parent_frame=pelvis_offset socket_child_frame=pectineus_offset
      PhysicalOffsetFrame pelvis_offset: socket_parent=/bodyset/pelvis translation=(0 0 0)
      PhysicalOffsetFrame pectineus_offset: socket_parent=/bodyset/pectineus translation=(0 0 0)
    WeldJoint pelvis_psoas: socket_parent_frame=pelvis_offset socket_child_frame=psoas_offset
      PhysicalOffsetFrame pelvis_offset: socket_parent=/bodyset/pelvis translation=(0 0 0)
      PhysicalOffsetFrame psoas_offset: socket_parent=/bodyset/psoas translation=(0 0 0)
    WeldJoint pelvis_quadfem: socket_parent_frame=pelvis_offset socket_child_frame=quadfem_offset
      PhysicalOffsetFrame pelvis_offset: socket_parent=/bodyset/pelvis translation=(0 0 0)
      PhysicalOffsetFrame quadfem_offset: socket_parent=/bodyset/quadfem translation=(0 0 0)
    WeldJoint pelvis_rf: socket_parent_frame=pelvis_offset socket_child_frame=rf_offset
      PhysicalOffsetFrame pelvis_offset: socket_parent=/bodyset/pelvis translation=(0 0 0)
      PhysicalOffsetFrame rf_offset: socket_parent=/bodyset/rf translation=(0 0 0)
    WeldJoint pelvis_sartorius: socket_parent_frame=pelvis_offset socket_child_frame=sartorius_offset
      PhysicalOffsetFrame pelvis_offset: socket_parent=/bodyset/pelvis translation=(0 0 0)
      PhysicalOffsetFrame sartorius_offset: socket_parent=/bodyset/sartorius translation=(0 0 0)
    WeldJoint pelvis_semimem: socket_parent_frame=pelvis_offset socket_child_frame=semimem_offset
      PhysicalOffsetFrame pelvis_offset: socket_parent=/bodyset/pelvis translation=(0 0 0)
      PhysicalOffsetFrame semimem_offset: socket_parent=/bodyset/semimem translation=(0 0 0)
    WeldJoint pelvis_semiten: socket_parent_frame=pelvis_offset socket_child_frame=semiten_offset
      PhysicalOffsetFrame pelvis_offset: socket_parent=/bodyset/pelvis translation=(0 0 0)
      PhysicalOffsetFrame semiten_offset: socket_parent=/bodyset/semiten translation=(0 0 0)
    WeldJoint pelvis_tfl: socket_parent_frame=pelvis_offset socket_child_frame=tfl_offset
      PhysicalOffsetFrame pelvis_offset: socket_parent=/bodyset/pelvis translation=(0 0 0)
      PhysicalOffsetFrame tfl_offset: socket_parent=/bodyset/tfl translation=(0 0 0)
