# OpenSim document version 40000
Model Tug_of_War:
  gravity: 0 -9.80665 0
  credits: Model authors names..
  publications: List of publications related to model...
  length_units: meters
  force_units: N
  Ground: meshes=(floor_short.vtp large_block_1.vtp large_block_2.vtp)
  BodySet:
    Body block: mass=20 [kg] mass_center=(0 0 0) inertia=(0.001 0.001 0.001 0 0 0) meshes=small_block.vtp
  JointSet:
    CustomJoint ground_block: socket_parent_frame=ground_offset socket_child_frame=block_offset
      Coordinate block_tz: default_value=0 range=(-0.3 0.3) clamped=true
      PhysicalOffsetFrame ground_offset: socket_parent=/ground translation=(0 0 0) [meters]
      PhysicalOffsetFrame block_offset: socket_parent=/bodyset/block translation=(0 0 0)
      SpatialTransform: axes_held_at_zero=(rotation1 rotation2 rotation3 translation2 translation3)
        TransformAxis translation1: coordinates=block_tz axis=(0 0 1) LinearFunction(coefficients=1 0)
  ForceSet:
    Schutte1993Muscle_Deprecated muscle_1: optimal_force=1 max_isometric_force=1000 optimal_fiber_length=0.1
        tendon_slack_length=0.2 pennation_angle_at_optimal=0 [radians] max_contraction_velocity=10 time_scale=0.1
        activation1=0.01 activation2=0.04 damping=0.05
      PathPoint P1: ground (0 0.05 -0.35)
      PathPoint P2: block (0 0.05 0.05)
      tendon_force_length_curve: SimmSpline: x=(-10 -0.002 -0.001 0 0.00131 0.00281 0.00431 0.00581 0.00731 0.00881 0.0103 0.0118 0.0123 9.2 9.201 9.202 20)
          y=(0 0 0 0 0.0108 0.0257 0.0435 0.0652 0.0915 0.123 0.161 0.208 0.227 345 345 345 345)
      active_force_length_curve: SimmSpline: x=(-5.30769 -4.30769 -1.92308 -0.884615 -0.269231 0.230769 0.461538 0.52725 0.62875 0.71875 0.86125 1.045 1.2175 1.43875 1.5 1.61539 2 2.96154 3.69231 5.46154 9.9019)
          y=(0.012188 0.021899 0.036466 0.052493 0.075312 0.114158 0.157859 0.226667 0.636667 0.856667 0.95 0.993333 0.77 0.246667 0.193821 0.133252 0.072683 0.044417 0.036341 0.021899 0.007332)
      passive_force_length_curve: SimmSpline: x=(-5 0.998 0.999 1 1.1 1.2 1.3 1.4 1.5 1.6 1.601 1.602 5)
          y=(0 0 0 0 0.035 0.12 0.26 0.55 1.17 2 2 2 2)
    Schutte1993Muscle_Deprecated muscle_2: optimal_force=1 max_isometric_force=1000 optimal_fiber_length=0.1
        tendon_slack_length=0.2 pennation_angle_at_optimal=0 max_contraction_velocity=10 time_scale=0.1
        activation1=0.01 activation2=0.04 damping=0.05
      PathPoint P1: ground (0 0.05 0.35)
      PathPoint P2: block (0 0.05 0.05)
      tendon_force_length_curve: SimmSpline: x=(-10 -0.002 -0.001 0 0.00131 0.00281 0.00431 0.00581 0.00731 0.00881 0.0103 0.0118 0.0123 9.2 9.201 9.202 20)
          y=(0 0 0 0 0.0108 0.0257 0.0435 0.0652 0.0915 0.123 0.161 0.208 0.227 345 345 345 345)
      active_force_length_curve: SimmSpline: x=(-5.30769 -4.30769 -1.92308 -0.884615 -0.269231 0.230769 0.461538 0.52725 0.62875 0.71875 0.86125 1.045 1.2175 1.43875 1.5 1.61539 2 2.96154 3.69231 5.46154 9.9019)
          y=(0.012188 0.021899 0.036466 0.052493 0.075312 0.114158 0.157859 0.226667 0.636667 0.856667 0.95 0.993333 0.77 0.246667 0.193821 0.133252 0.072683 0.044417 0.036341 0.021899 0.007332)
      passive_force_length_curve: SimmSpline: x=(-5 0.998 0.999 1 1.1 1.2 1.3 1.4 1.5 1.6 1.601 1.602 5)
          y=(0 0 0 0 0.035 0.12 0.26 0.55 1.17 2 2 2 2)
