# OpenSim document version 40000
ForwardTool Simulation_Lab4:
  replace_force_set: false
  results_directory: ResultsForward
  output_precision: 20
  initial_time: 0
  final_time: 1
  solve_for_equilibrium_for_auxiliary_states: false
  maximum_number_of_integrator_steps: 30000
  maximum_integrator_step_size: 0.0001
  minimum_integrator_step_size: 1e-8
  integrator_error_tolerance: 5e-6
  states_file: Simulation_Lab4_initial_states.sto
  use_specified_dt: false
  AnalysisSet Analyses:
    Kinematics: coordinates=all on=false start_time=0 end_time=1 step_interval=1 in_degrees=true
    Actuation: start_time=0 end_time=1 step_interval=1 in_degrees=true
    BodyKinematics: on=false start_time=0 end_time=1 step_interval=1 in_degrees=true bodies=all
        express_results_in_body_local_frame=false
    MuscleAnalysis: on=false start_time=0 end_time=1 step_interval=1 in_degrees=true muscle_list=(muscle_1 muscle_2)
        moment_arm_coordinate_list=(muscle_1 muscle_2) compute_moments=false
  ControllerSet Controllers:
    ControlSetController: controls_file=Simulation_Lab4_controls.sto
